# Design notes
# Structure's geometry:
# - Cylinder:
# - thickness  t_cylinder := 1.2 m
# - radius  R_cylinder := 22 m
# - height  H_cylinder := 41.6 m
# - Dome:
# - thickness  t_dome := 1 m
# - radius  R_dome := 22 m  Relative humidity:  RH := 50%
# Materials properties:
#
# Concrete:
# - characteristic strength  f_ck := 37.5 MPa
# - elastic modulus  E_c := 29000 MPa
# - Poisson's ratio  ν_c := 0.2
# - thermal expansion coefficient  α_c := 10*10^-6 C^-1
# - density  ρ_c := 2500 kg/m^3
# Passive steel
# - characteristic yielding stress  f_yk := 390 MPa
# - elastic modulus  E_s := 200 GPa
# - ultimate strain  ε_uk := 5%
# - the extrados reinforcement comprises 40cm²/m per direction.
# - the intrados reinforcement comprises 25cm²/m per direction.
# - stirrup section of 10cm²/m².
# - covering is 50mm on the stirrup head.
# Metal liner  P265GH black steel
# - minimal yielding stress  f_l.min := 255 MPa
# - average yielding stress  f_l.avg := 320 MPa
# - elastic modulus  E_l := 210 GPa
# - Poisson's ratio  ν_l := 0.28
# - thermal expansion coefficient  α_l := 12*10^-6 C^-1
# - density  ρ_l := 7850 kg/m^3
# -
# - thickness of the liner on the cylindrical part  t_liner.cylinder := 7 mm
# - thickness of the liner on the dome  t_liner.dome := 9 mm
A_passive.steel := 65 cm^2/m
# Prestressed steel  - cement grouted tendons
#
# T15 strands (15.7mm in diameter) class 1860 MPa VSR
# Each tendon comprises 55 strands (55T15)
# - nominal section of a trand  A_p := 150 mm^2  (55 strands - A_55T15 := 55*A_p = 8250 mm^2)
# - guaranteed ultimate strength  f_pk := 1860 MPa
# - guaranteed strength per strand  A_p*f_pk = 279 kN
# - yield stress  f_p.y := 1653 MPa
# - anchorage slip  8*mm
# - elastic modulus  E_p := 190 GPa
# - relaxation coefficient (20°C)  ρ_1000 := 2.5%
# - The tendons are tensioned from the 2 extremities at  σ_0 := 0.8*f_pk = 1488 MPa
# -
# - ducts diameter  ϕ_duct := 165 mm
# - friction coefficient on curve
# - horizontal cables  μ_h := 0.18*1/rad
# - vertical cables and dome  μ_v := 0.16*1/rad
# - loss coefficient due to local angular deviations in the duct
# - horizontal cables and dome  k_h := 0.009*1/m
# - vertical cables  k_v := 0.005*1/m
# The internal containment is sized to withstand during 60 years:
# LOCA accident:
P_d := 0.40 MPa  # (relative)
# Containment pressure test:
P_t := 1.15*P_d = 0.46 MPa
# Average radius of tendons
R_ext.tendon.v := R_dome + t_dome - 1.5*ϕ_duct = 22.7525 m
R_ext.tendon.h := R_cylinder + t_cylinder - 1.5*ϕ_duct = 22.9525 m
R_int.tendon.v := R_dome + t_dome - 2.5*ϕ_duct = 22.5875 m
R_int.tendon.h := R_cylinder + t_cylinder - 3.5*ϕ_duct = 22.6225 m
R_avg.v := (R_ext.tendon.v + R_int.tendon.v)/2 = 22670 mm
R_avg.h := (R_ext.tendon.h + R_int.tendon.h)/2 = 22787.5 mm
# Dome tendons
# Necessary vertical prestress:  F_V.min := P_d*R_dome/2 + f_l.avg*t_liner.dome + A_passive.steel*f_yk = 9.815 MN/m
# 1)Friction losses
α := π/2
R_avg.v = 22670 mm
σ_0.5π := σ_0*e^(-(μ_v*α + k_v*μ_v*(α*R_avg.v + H_cylinder))) = 1088 MPa
# 2)Elastic losses
# The concrete stress due to prestress at the end of life is:
σ_f := F_V.min/t_dome = 9.815 MPa
# If we assume about 20 % of losses, the concrete stress due to prestress at the construction is about:
σ_i := 1.2*σ_f = 11.778 MPa
# The elastic losses are:
L_e := 1/2*σ_i/E_c*E_p = 38.5831 MPa
# Stresses after construction:σ_0.5π.c := σ_0.5π - L_e = 1049.41 MPa  maximum tensile stress applied to the tendon minus the immediate losses occurred during the stressing process
# 3)Relaxation losses
#
# Class 2: wire or strand - low relaxation
# The design calculations for the losses due to relaxation of the prestressing steel is based on the value of ρ_1000, the relaxation loss (in %) at 1000 hours after tensioning and at a mean temperature of 20°C
μ := σ_0.5π.c/f_pk = 0.564201
t_e := 24*365.5*60 = 526320  # the number of hours in 30 years
L_r(t) := 0.66*ρ_1000*100*e^(9.1*μ)*(t/1000)^(0.75*(1 - μ))*10^-5*σ_0.5π.c
# [plot: L_r(t) (MPa) vs t]
Δσ_ρ := L_r(t_e) = 22.7843 MPa
# 4) Concete differed strain losses
# a) Shrinkage
# We consider desiccation shrinkage of concrete during 60 years and the autogenous shrinkage is neglected.
K := 18  # (f_ck < 55*MPa)
β_cd := 0.021  # (concrete without silica)
h_0 := 2*t_dome = 2000 mm
ε_cd(t) := K*(72*exp(-0.046*f_ck/MPa) + 75 - RH*100)*365.25*t*10^-6/(365.25*t + β_cd*(h_0/mm)^2)
ε_v.ds := ε_cd(61) - ε_cd(1) = 0.000139796
# b) Creep
# - Basic creep (anisotropic)
φ_b0 := 1.4
β_bc := 0.4*exp(3.1*f_ck/f_ck) = 8.87918
φ_b(t) := φ_b0*sqrt(t)/(sqrt(t) + β_bc)
φ_b(60) = 0.652286
ε_v.i := σ_i/(0.8*E_c)*(1 - ν_c) = 0.000406138
ε_v.bc := φ_b(60)*ε_v.i = 0.000264918
# - Desiccation creep (isotropic)
φ_d0 := 3200
φ_d(t_f, t_i) := φ_d0*(ε_cd(t_f) - ε_cd(t_i))
φ_d(60, 1) = 0.441409
σ_m := 2*σ_i = 23.556 MPa
ε_v.dc := φ_d(60, 1)*σ_m/(0.8*E_c) = 0.000448183
# Recapitulation:
# Shrinkage + basic creep + desiccation creep:  ε_v.dl := ε_v.ds + ε_v.bc + ε_v.dc = 0.000852897
# Concrete differed prestress losses:  Δσ_v.dl := ε_v.dl*E_p = 162.05 MPa
# Final tension:  σ_v.f := σ_0.5π.c - 0.8*Δσ_ρ - Δσ_v.dl = 869.135 MPa
# Spacing
e_d := σ_v.f*A_55T15/F_V.min = 730.552 mm
# Pressure test
# Force in case of pressure test:
N_pressure := P_t*R_dome/2 = 5.06 MN/m
# Effect of the liner and rebars thrust:
#
# Shrinkage + basic creep + desiccation creep: ε_v.dl = 0.000852897
#
# Liner thrust:  σ_liner := ε_v.dl*E_l = 179.108 MPa
#
# Rebar thrust:  σ_rebar := ε_v.dl*E_s = 170.579 MPa
#
# A_S.liner := t_liner.dome*1 m/(1 m) = 90 cm^2/m  N_liner := A_S.liner*σ_liner = 1.61198 MN/m
# A_S.rebar := (40 + 25) cm^2/m = 65 cm^2/m  N_rebar := A_S.rebar*σ_rebar = 1.10877 MN/m
# Total pressure:  N_total.test := N_pressure + N_liner + N_rebar = 7.78074 MN/m
# Instead of F_V.min = 9.815 MN/m in case of LOCA
# Spacing
e_d := σ_v.f*A_55T15/N_total.test = 921.553 mm  # larger than needed for LOCA case
# Length of a chord of arc  corresponding to π/2 is D_c := 2*R_dome*sin(π/4) = 31.1127 m
# Thus the number of tendons needed is D_c/e_d = 33.7612
#
# Because of large tension stresses in concrete obtained with 34 cables on FEM model we will proceed the analysis by considering 57 tendons on each direction spaced at 540mm. Then it will result a covered length of 56*540 mm = 30.24 m
# Ultimate pressure assessment
# Ultimate membrane strength of section (with liner). The ultimate force is obtained assuming the failure occurs when the most "brittle" element fails; i.e. tendons when they reach a 3% tensile strain.
# σ_tendons := 1888 MPa in the same time with:
# σ_liner := 279 MPa
# σ_rebar := 419 MPa  (f_yk = 390 MPa)
# e_d := 540 mm
#
# The failure force is obtained by:
# Tendons section  S_tendons := A_55T15*1/e_d = 152.778 cm^2/m  n_tendons := S_tendons*σ_tendons = 28.8444 MN/m
# Liner section  S_liner := t_liner.dome = 90 cm^2/m  n_liner := S_liner*σ_liner = 2.511 MN/m
# Rebar section  intrados 25 cm^2/m  extrados  40 cm^2/m
# S_rebar := 25 cm^2/m + 40 cm^2/m = 65 cm^2/m  n_rebar := S_rebar*σ_rebar = 2.7235 MN/m
#
# N_rupture := n_tendons + n_liner + n_rebar = 34.0789 MN/m
# Hence we obtain the ultimate pressure P_ultimate.dome := N_rupture/R_dome = 1.54904 MPa
# This value is considered as median value with 50% confidence. Thus is determined with the average values of the cross sections and of the mechanical characteristics.
# Cylinder tendons
# Necessary horizontal prestress:  F_H.min := P_d*R_cylinder + f_l.avg*t_liner.cylinder + A_passive.steel*f_yk = 13.575 MN/m
# 1)Friction losses
α := π/2
R_avg.h = 22787.5 mm
σ_0.5π := σ_0*e^(-(μ_h*α + k_h*μ_h*α*R_avg.h)) = 1058.34 MPa
# 2)Elastic losses
# The concrete stress due to prestress at the end of life is:
σ_f := F_H.min/t_cylinder = 11.3125 MPa
# If we assume about 20 % of losses, the concrete stress due to prestress at the construction is about:
σ_i := 1.2*σ_f = 13.575 MPa
# The elastic losses are:
L_e := 1/2*σ_i/E_c*E_p = 44.4698 MPa
# Stresses after construction:
σ_0.5π.c := σ_0.5π - L_e = 1013.87 MPa
# 3)Relaxation losses
μ := σ_0.5π.c/f_pk = 0.545092
t_e := 24*365.5*60 = 526320
L_r(t) := 0.66*ρ_1000*100*e^(9.1*μ)*(t/1000)^(0.75*(1 - μ))*10^-5*σ_0.5π.c
Δσ_ρ := L_r(t_e) = 20.2373 MPa
# 4) Concete differed strain losses
# a) Shrinkage
# We consider desiccation shrinkage of concrete during 60 years and the autogenous shrinkage is neglected.
K := 18  # (f_ck < 55*MPa)
β_cd := 0.021  # (concrete without silica)
h_0 := 2*t_cylinder = 2400 mm
ε_cd(t) := K*(72*exp(-0.046*f_ck/MPa) + 75 - RH*100)*365.25*t*10^-6/(365.25*t + β_cd*(h_0/mm)^2)
ε_h.ds := ε_cd(61) - ε_cd(1) = 0.000103862
# b) Creep
# - Basic creep (anisotropic)
φ_b0 := 1.4
β_bc := 0.4*exp(3.1*f_ck/f_ck) = 8.87918
φ_b(t) := φ_b0*sqrt(t)/(sqrt(t) + β_bc)
φ_b(60) = 0.652286
# Vertical prestress and dead load:
# - vertical prestress  F_V.min = 9.815 MN/m
# - dead load
# volume of the cylinder  V_cylinder := π*((R_cylinder + t_cylinder)^2 - R_cylinder^2)*H_cylinder = 7088.64 m^3volume of the dome  V_dome := 4/6*π*((R_dome + t_dome)^3 - R_dome^3) = 3181.39 m^3
# circular length of the cylinder  CL_cylinder := 2*π*(R_cylinder + t_cylinder/2) = 142 m
# dead load  G_DL := ρ_c*(1 + 20%)*(V_cylinder + V_dome)/CL_cylinder = 216972 kg/m
# dead load force  F_DL := G_DL*g = 2.12777 MN/m  where g = 9.80665 m/s^2
# The force applied by the vertical prestress and dead load is  F_VT := F_V.min/2 + F_DL = 7.03527 MN/m immediately after the prestessing. Thus the vertical stress σ_v := F_VT/t_cylinder = 5.86273 MPa
ε_h.i := σ_i/(0.8*E_c) - ν_c*σ_v/(0.8*E_c) = 0.000534589
ε_h.bc := φ_b(60)*ε_h.i = 0.000348705
# - Desiccation creep (isotropic)
φ_d0 := 3200
φ_d(t_f, t_i) := φ_d0*(ε_cd(t_f) - ε_cd(t_i))
φ_d(60, 1) = 0.327656
σ_m := σ_i + σ_v = 19.4377 MPa
ε_h.dc := φ_d(60, 1)*σ_m/(0.8*E_c) = 0.000274521
# Recapitulation:
# Shrinkage + basic creep + desiccation creep:  ε_h.dl := ε_h.ds + ε_h.bc + ε_h.dc = 0.000727088
# Concrete differed prestress losses:  Δσ_h.dl := ε_h.dl*E_p = 138.147 MPa
# Final tension:  σ_h.f := σ_0.5π.c - 0.8*Δσ_ρ - Δσ_h.dl = 859.535 MPa
# Spacing
e_d := σ_h.f*A_55T15/F_V.min = 722.482 mm
# Pressure test
# Force in case of pressure test:
N_pressure := P_t*R_cylinder = 10.12 MN/m
# Effect of the liner and rebars thrust:
#
# Shrinkage + basic creep + desiccation creep:  ε_h.dl = 0.000727088
#
# Liner thrust:  σ_liner := ε_h.dl*E_l = 152.688 MPa
#
# Rebar thrust:  σ_rebar := ε_h.dl*E_s = 145.418 MPa
#
# A_S.liner := t_liner.cylinder*1 m/(1 m) = 70 cm^2/m  N_liner := A_S.liner*σ_liner = 1.06882 MN/m
# A_S.rebar := (40 + 25) cm^2/m = 65 cm^2/m  N_rebar := A_S.rebar*σ_rebar = 0.945214 MN/m
# Total pressure:  N_total.test := N_pressure + N_liner + N_rebar = 12.134 MN/m
# Instead of F_H.min = 13.575 MN/m in case of LOCA
# Spacing
e_d := σ_h.f*A_55T15/N_total.test = 584.403 mm
# Thus the number of tendons needed is H_cylinder/e_d = 71.1838- thus 72 vertical tendons
# We will consider the tendons spaced at 580 mm. Then it will result a covered length of 71*580 mm = 41.18 m
# Ultimate pressure assessment
# Ultimate membrane strength of section (with liner). The ultimate force is obtained assuming the failure occurs when the most "brittle" element fails; i.e. tendons when they reach a 3% tensile strain.
# σ_tendons := 1888 MPa in the same time with:
# σ_liner := 279 MPa
# σ_rebar := 419 MPa  (f_yk = 390 MPa)
# e_d := 580 mm
#
# The failure force is obtained by:
# Tendons section  S_tendons := A_55T15*1/e_d = 142.241 cm^2/m  n_tendons := S_tendons*σ_tendons = 26.8552 MN/m
# Liner section  S_liner := t_liner.cylinder = 70 cm^2/m  n_liner := S_liner*σ_liner = 1.953 MN/m
# Rebar section  intrados 25 cm^2/m  extrados  40 cm^2/m
# S_rebar := 25 cm^2/m + 40 cm^2/m = 65 cm^2/m  n_rebar := S_rebar*σ_rebar = 2.7235 MN/m
#
# N_rupture := n_tendons + n_liner + n_rebar = 31.5317 MN/m
# Hence we obtain the ultimate pressure P_ultimate.cylinder := N_rupture/R_cylinder = 1.43326 MPa
# This value is considered as median value with 50% confidence. Thus is determined with the average values of the cross sections and of the mechanical characteristics.
# Recalling the ultimate pressure in for the dome section P_ultimate.dome = 1.54904 MPa can be conclude that with the current configuration the cylinder will fail before the dome at the ultimate pressure of 14.43 bars (50% confidence).
